*Heading
** Job name: torqueJob Model name: Model-1
** Generated by: Abaqus/CAE 2017.HF8
*Preprint, echo=NO, model=NO, history=NO, contact=NO
**
** PARTS
**
*Part, name=Part-1
*Node
      1,           2.,           0.,          10.
      2,           2.,           0.,           0.
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*Element, type=C3D8H
   1,  188, 1337, 2593, 1185,    1,    9,  273,   94
   2, 1337, 1338, 2594, 2593,    9,   10,  274,  273
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*Node
   6241,           0.,           0.,          10.
*Nset, nset=Part-1-RefPt_, internal
6241,
*Nset, nset=Set-1, generate
    1,  6240,     1
*Elset, elset=Set-1, generate
    1,  5000,     1
*Orientation, name=Ori-1, system=CYLINDRICAL
          0.,           0.,           0.,           0.,           0.,           1.
2, 90.
** Section: Section-1
*Solid Section, elset=Set-1, orientation=Ori-1, material=Material-1
,
*End Part
**
**
** ASSEMBLY
**
*Assembly, name=Assembly
**
*Instance, name=Part-1-1, part=Part-1
*End Instance
**
*Nset, nset=Set-2, instance=Part-1-1
    2,    3,    5,    6,   33,   34
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*Elset, elset=Set-2, instance=Part-1-1
   25,   50,   75,  100,  125,  150
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*Nset, nset=m_Set-1, instance=Part-1-1
 6241,
*Elset, elset=_s_Surf-1_S6, internal, instance=Part-1-1, generate
    1,  2476,    25
*Elset, elset=_s_Surf-1_S4, internal, instance=Part-1-1, generate
 2525,  5000,    25
*Surface, type=ELEMENT, name=s_Surf-1
_s_Surf-1_S6, S6
_s_Surf-1_S4, S4
** Constraint: Constraint-1
*Coupling, constraint name=Constraint-1, ref node=m_Set-1, surface=s_Surf-1
*Kinematic
*End Assembly
**
** MATERIALS
**
*Material, name=Material-1
*Depvar
    5,
*User Material, constants=7
.2, 2.0, 0.2, 2, 0.0, 60,-60
** ----------------------------------------------------------------
**
** STEP: Step-1
**
*Step, name=Step-1, nlgeom=YES, unsymm=YES
*Static
1., 1., 1e-05, 1.
**
** BOUNDARY CONDITIONS
**
** Name: BC-1 Type: Displacement/Rotation
*Boundary
Set-2, 1, 1
Set-2, 2, 2
Set-2, 3, 3
**
** LOADS
**
** Name: Load-1   Type: Moment
*Boundary
m_Set-1, 6, 6, 1.0
m_Set-1, 3, 3, 0.5
**
** OUTPUT REQUESTS
**
*Restart, write, frequency=0
**
** FIELD OUTPUT: F-Output-1
**
*Output, field
*Node Output
U,
*Element Output, directions=YES
NE, S, SDV
**
** HISTORY OUTPUT: H-Output-1
**
*Output, history, variable=PRESELECT
*End Step
